2 - размерность  # (элементов)
# Размерность | число узлов | Координаты
d := 2
n := 3
c := 4
# Степень своободы
D := n*c → 12
# Длина X
a := 1
# Длина Y
b := 1
N := n
# Вычисление
n := mod(floor(N/2) - 1, 2) + 3 → 3  # Число вешин
η := floor((N - n)/n)*n → 0  # Промежуточные вершины
π := N - n - η → 0  # Внутренние  узлы
Узлы
n = 3
i := 1 .. n  # Создание вершин узла
X[i - 1] := a*(mod(i - 1, 2) + 0.5*(n == 3)*(i == 3))
n == 3 = 1
Y[i - 1] := b*floor((i - 1)/2)
# Обмен
t := X[2]
X[2] := X[n - 1]
X[n - 1] := t
t := Y[2]
Y[2] := Y[n - 1]
Y[n - 1] := t
transpose(X) = [0, 1, 0.5]
transpose(Y) = [0, 0, 1]
# Создание промежуточных вершин
XY(X, Y) :=
    nn ← n
    for j ∈ 1 .. n
        if η/n ≥ 1
            for i ∈ 1 .. η/n
                X[nn] ← X[j - 1] + i*(X[mod(j, n)] - X[j - 1])/(η/n + 1)
                Y[nn] ← Y[j - 1] + i*(Y[mod(j, n)] - Y[j - 1])/(η/n + 1)
                nn ← nn + 1
    augment(X, Y)
X := XY(X, Y)[:, 0]
transpose(X) = [0, 1, 0.5]
Y := XY(X, Y)[:, 1]
transpose(Y) = [0, 0, 1]
# Создание внутренних узлов
XY(X, Y) :=
    if π > 0
        X[length(X)] ← mean(X)
        Y[length(Y)] ← mean(Y)
    augment(X, Y)
xy := XY(X, Y)
X := xy[:, 0]
transpose(X) = [0, 1, 0.5]
Y := xy[:, 1]
transpose(Y) = [0, 0, 1]
# Вычисление
k := 0 .. D - 1
g[k] := ceil((sqrt(1 + 8*(k + 1)) - 1)/2 - 1)
d[k] := ceil((sqrt(1 + 8*D) - 1)/2 - 1)
k0[k] := g[k]*(g[k] + 1)/2
k12[k] := (D == 12)*(d[k] == g[k])
B[k] := floor((k0[k] + g[k] - k - k12[k])/2)
M[k] := mod(k0[k] + g[k] - k - k12[k], 2)*(1 - (d[k] == g[k])*(d[k] == k + 1))
α21D[k] := (1 - M[k])*B[k] + M[k]*(g[k] - B[k])
α22D[k] := (1 - M[k])*(g[k] - B[k]) + M[k]*B[k]
transpose(α21D) = [0, 1, 0, 1, 2, 0, 2, 1, 3, 0, 3, 1]
transpose(α22D) = [0, 0, 1, 1, 0, 2, 1, 2, 0, 3, 1, 3]
# Вычисление матрицы W
W :=
    l ← 0
    for i ∈ 1 .. N
        for j ∈ 0 .. c - 1
            l ← l + 1
            for k ∈ 0 .. D - 1
                p ← 1
                if α21D[j] > 0
                    for q ∈ α21D[k] - α21D[j] + 1 .. α21D[k]
                        p ← p*q
                w[l - 1, k] ← p*X[i - 1]^(α21D[k] - α21D[j]) if α21D[k] ≥ α21D[j]
                w[l - 1, k] ← 0 if α21D[k] < α21D[j]
                p ← 1
                if α22D[j] > 0
                    for q ∈ α22D[k] - α22D[j] + 1 .. α22D[k]
                        p ← p*q
                w[l - 1, k] ← w[l - 1, k]*p*Y[i - 1]^(α22D[k] - α22D[j]) if α22D[k] ≥ α22D[j]
                w[l - 1, k] ← 0 if α22D[k] < α22D[j]
    w
W = [
    1, 0, 0, 0, 0, 0, 0, 0, 0, 0, 0, 0;
    0, 1, 0, 0, 0, 0, 0, 0, 0, 0, 0, 0;
    0, 0, 1, 0, 0, 0, 0, 0, 0, 0, 0, 0;
    0, 0, 0, 1, 0, 0, 0, 0, 0, 0, 0, 0;
    1, 1, 0, 0, 1, 0, 0, 0, 1, 0, 0, 0;
    0, 1, 0, 0, 2, 0, 0, 0, 3, 0, 0, 0;
    0, 0, 1, 1, 0, 0, 1, 0, 0, 0, 1, 0;
    0, 0, 0, 1, 0, 0, 2, 0, 0, 0, 3, 0;
    1, 0.5, 1, 0.5, 0.25, 1, 0.25, 0.5, 0.125, 1, 0.125, 0.5;
    0, 1, 0, 1, 1, 0, 1, 1, 0.75, 0, 0.75, 1;
    0, 0, 1, 0.5, 0, 2, 0.25, 1, 0, 3, 0.125, 1.5;
    0, 0, 0, 1, 0, 0, 1, 2, 0, 0, 0.75, 3
]
W1 := W^-1
W1 = [
    1, 0, 0, 0, 0, 0, 0, 0, 0, 0, 0, 0;
    0, 1, 0, 0, 0, 0, 0, 0, 0, 0, 0, 0;
    0, 0, 1, 0, 0, 0, 0, 0, 0, 0, 0, 0;
    0, 0, 0, 1, 0, 0, 0, 0, 0, 0, 0, 0;
    -3, -2, 0, 0, 3, -1, 0, 0, 0, 0, 0, 0;
    -3.75, -0.75, -2.5, -0.5, 0.75, 0, 0.5, 0, 3, -1.5, -1, 0.5;
    0, 0, -3, -2, 0, 0, 3, -1, 0, 0, 0, 0;
    4.5, 0.75, 3, 0.5, -4.5, 0.75, -3, 0.5, 0, 3, 0, -1;
    2, 1, 0, 0, -2, 1, 0, 0, 0, 0, 0, 0;
    2.5, 0.5, 1.25, 0.25, -0.5, 0, -0.25, 0, -2, 1, 1, -0.5;
    0, 0, 2, 1, 0, 0, -2, 1, 0, 0, 0, 0;
    -3, -0.5, -1.5, -0.25, 3, -0.5, 1.5, -0.25, 0, -2, 0, 1
]
z[D - 1] := 0
transpose(z) = [0, 0, 0, 0, 0, 0, 0, 0, 0, 0, 0, 0]
z[6] := 4
z[1] := 0
z[4] := 8
transpose(z) = [0, 0, 0, 0, 8, 0, 4, 0, 0, 0, 0, 0]
# Интерпол Полином
P(x, y, z) :=
    p ← 0
    for l ∈ 0 .. D - 1
        for k ∈ 0 .. D - 1
            p ← p + x^α21D[k]*y^α22D[k]*W1[k, l]*z[l]
    p
# Инциализация конфигурации
np := 10
i := 0 .. np
j := 0 .. np
yy[i, j] := j*b/np
xx[i, j] := X[0] + (X[n - 1] - X[0])*j/np + (X[1] - X[0])*i/np*((n == 4) + (np - j)/np*(n == 3))
zz[i, j] := P(xx[i, j], yy[i, j], z)
# [component: inputs (xx, yy, zz)]
# Изменение z
z[1] := 1
transpose(z) = [0, 1, 0, 0, 8, 0, 4, 0, 0, 0, 0, 0]
# Инициадизация конфигурации
np := 10
i := 0 .. np
j := 0 .. np
yy[i, j] := j*b/np
xx[i, j] := X[0] + (X[n - 1] - X[0])*j/np + (X[1] - X[0])*i/np*((n == 4) + (np - j)/np*(n == 3))
zz[i, j] := P(xx[i, j], yy[i, j], z)
# [component: inputs (xx, yy, zz)]
