1 - размерность  # (элементов)
# число введённых координат в каждом узле.
# размерность | число узлов элемента
d := 0
n := 3
c := 2
# Степени
D := n*c → 6
Длина
L := 1
N := n
Ноды
i := 1 .. N
X[i - 1] := L/(N - 1)*(i - 1)
transpose(X) = [0, 0.5, 1]
# Вычисление  матрицы  W
W :=
    l ← 0
    for i ∈ 1 .. N
        for j ∈ 0 .. c - 1
            l ← l + 1
            for k ∈ 1 .. D
                p ← 1
                if j > 0
                    for q ∈ k - 1 - j + 1 .. k - 1
                        p ← p*q
                w[l - 1, k - 1] ← p*X[i - 1]^((k - 1) - j) if k - 1 ≥ j
                w[l - 1, k - 1] ← 0 if k - 1 < j
    w
W = [
    1, 0, 0, 0, 0, 0;
    0, 1, 0, 0, 0, 0;
    1, 0.5, 0.25, 0.125, 0.0625, 0.03125;
    0, 1, 1, 0.75, 0.5, 0.3125;
    1, 1, 1, 1, 1, 1;
    0, 1, 2, 3, 4, 5
]
W1 := W^-1
W1 = [
    1, 0, 0, 0, 0, 0;
    0, 1, 0, 0, 0, 0;
    -23, -6, 16, -8, 7, -1;
    66, 13, -32, 32, -34, 5;
    -68, -12, 16, -40, 52, -8;
    24, 4, 0, 16, -24, 4
]
z[D - 1] := 0
transpose(z) = [0, 0, 0, 0, 0, 0]
# Интерполяционный полином
i := 0 .. N - 1
P(x, z) :=
    p ← 0
    for l ∈ 1 .. D
        for k ∈ 1 .. D
            p ← p + x^(k - 1)*W1[k - 1, l - 1]*z[l - 1]
    p
# Начальная конфигур (with zero coordinates)
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z[5] := 4
z[0] := 0
z[1] := 2
z[3] := -1
transpose(z) = [0, 2, 0, -1, 0, 4]
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